a := 0.5
Radius := 0.2
q1 := 0, 0.1 .. 2*π
l1 := 0.2
alpha0 := asin(l1/a)
xcpr(q1) := -Radius/sqrt(1 - (l1*cos(q1))^2/(l1^2 + 2*l1*a*sin(q1) + a^2))*(-1/2*cos(q1)*2*l1*l1*cos(q1)/(l1^2 + 2*l1*a*sin(q1) + a^2)*a/sqrt(l1^2 + 2*l1*a*sin(q1) + a^2) + (-sin(q1)*l1*sqrt(l1^2 + 2*l1*a*sin(q1) + a^2)/(l1^2 + 2*l1*a*sin(q1) + a^2)))
phi3(q1) := acos(l1*cos(q1)/sqrt(l1^2 + 2*l1*sin(q1)*a + a^2))
alpha(q1) := phi3(q1) - π/2
U(q1) := sqrt(l1^2 + a^2 + 2*a*l1*sin(q1))
xc(q1) := (alpha0 + alpha(q1))*Radius
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phi3'(q1) := l1*cos(phi3(q1) - q1)/U(q1)
dU(q1) := d/dq1(U(q1))
dxc(q1) := d/dq1(xc(q1))
U'(q1) := l1*sin(phi3(q1) - q1)
dphi3(q1) := d/dq1(phi3(q1))
xc'(q1) := phi3'(q1)*Radius
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A1(q1) := -l1*cos(q1) + sin(phi3(q1))*phi3'(q1)*U'(q1) + cos(phi3(q1))*phi3'(q1)^2*U(q1) + U'(q1)*sin(phi3(q1))*phi3'(q1)
A2(q1) := -sin(q1)*l1 - cos(phi3(q1))*phi3'(q1)*U'(q1) + sin(phi3(q1))*phi3'(q1)^2*U(q1) - U'(q1)*cos(phi3(q1))*phi3'(q1)
phi3''(q1) := det([cos(phi3(q1)), A1(q1); sin(phi3(q1)), A2(q1)])/det([cos(phi3(q1)), -sin(phi3(q1))*U(q1); sin(phi3(q1)), cos(phi3(q1))*U(q1)])
U''(q1) := det([A1(q1), -sin(phi3(q1))*U(q1); A2(q1), cos(phi3(q1))*U(q1)])/det([cos(phi3(q1)), -sin(phi3(q1))*U(q1); sin(phi3(q1)), cos(phi3(q1))*U(q1)])
xc''(q1) := phi3''(q1)*Radius
ddx(q1) := phi3''(q1)*Radius
ddU(q1) := d/dq1(dU(q1))
ddphi3(q1) := d/dq1(dphi3(q1))
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q11 := 3.5
q_min := root(xc'(q11), q11)
q_min = 3.55311
q11 := 5.98
q_max := root(xc'(q11), q11)
q_max = 5.87167
H11 := |xc(q_max) - xc(q_min)|
H11 = 0.164607
S1(q1) := xc(q1) - xc(q_max)
H11 := 0.165
Given
700 == H11^2*AA + H11*B
1000 == 0.49*H11^2*AA + 0.7*B*H11
Find(AA, B) → [-89203.7255674; 18961.038961]
[AA; B] := [-89203.7255674; 18961.038961]
P(q1) :=
    AA*S1(q1)^2 + B*S1(q1) if 0 ≤ S1(q1) ≤ H11 and xc'(q1) ≤ 0
    0 otherwise
PP(q1) := 1000
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ρ := 50
m_1 := l1*ρ
g := 9.81
m_2 := 3*m_1
m_U(q1) := U(q1)*ρ
G1 := m_1*g
m_BC := Radius*ρ
G2 := m_2*g
m_duga := π*ρ
m_3(q1) := m_U(q1) + m_BC + m_duga
G_3(q1) := m_3(q1)*g
m_4 := m_duga
G_4 := m_4*g
x_1(q1) := cos(q1)*l1/2
y_1(q1) := sin(q1)*l1/2
y_2(q1) := sin(q1)*l1
x_2(q1) := cos(q1)*l1
x_U(q1) := cos(phi3(q1))*U(q1)/2
y_U(q1) := -a + sin(phi3(q1))*U(q1)/2
x_BC(q1) := -cos(phi3(q1))/2
y_BC(q1) := -sin(phi3(q1))*Radius/2 - a
y_duga(q1) := -sin(phi3(q1))*((3*π*Radius - 4*Radius)/(3*π)) - a
x_duga(q1) := -cos(phi3(q1))
x_3(q1) := (x_U(q1)*m_U(q1) + x_BC(q1)*m_BC + x_duga(q1)*m_duga)/(m_U(q1) + m_BC + m_duga)
y_3(q1) := (y_U(q1)*m_U(q1) + y_BC(q1)*m_BC + y_duga(q1)*m_duga)/(m_U(q1) + m_BC + m_duga)
y_4 := -a - Radius
x_4(q1) := xc(q1)
J_1(q1) := m_1*l1^2/12
J_2 := 0
J_U(q1) := m_U(q1)*U(q1)^2/12
J_BC(q1) := m_BC*Radius^2/12
J_duga(q1) := m_duga*Radius^2/2 - m_duga*(4*Radius/(3*π))^2
J_3(q1) := J_U(q1) + (x_U(q1) - x_3(q1))^2 + J_BC(q1) + (x_BC(q1) - x_3(q1))^2 + J_duga(q1) + (x_duga(q1) - x_3(q1))^2
